# a)
G_a(s) := 50000/((s + 50)*(s + 1000))
G_1(s) := 1
# closed loop:
C(s) := G_1(s)*G_a(s)/(1 + G_1(s)*G_a(s)) collect, s → 50000/(s^2 + 1050*s + 100000)
K_p := limit(G_1(s)*G_a(s), s → 0) → 1
K_v := limit(s*G_1(s)*G_a(s), s → 0) → 0
K_a := limit(s^2*C(s), s → 0) → 0
A_p := 1
A_v := 1
A_a := 1
e_p(∞) := A_p*1/(1 + K_p) = 0.5
e_v(∞) := A_v*1/K_v  # error: This expression is divided by zero. It cannot be computed.
e_a(∞) := A_a*1/K_a  # error: This expression is divided by zero. It cannot be computed.
# b) - Svar i word-doku
# c)
G_a(s) := 50000/((s + 50)*(s + 1000))
G_1(s) := 1
D(s) := 1
R(s) := 1/s
C(s) := G_a(s)*D(s)/(1 + G_1(s)*G_a(s)) collect, s → 50000/(s^2 + 1050*s + 100000)
# For at bestemme steady-state fejlen for systemet, hvor det første led stammer fra inputtet R(s) og det andet led fra forstyrrelsen D(s).
e(∞) := limit(s*R(s)/(1 + G_1(s)*G_a(s)), s → 0) - limit(s*G_a(s)*D(s)/(1 + G_1(s)*G_a(s)), s → 0) → 1/2 = 0.5
