# Øvelse 1
G(s) := 50000/((s + 50)*(s + 1000))
50000/((s + 50)*(s + 1000)) expand → 50000/(s^2 + 1050*s + 50000)
# Static error constant
K_p := limit(G(s), s → 0) → 1
K_p_error := 1*1/(1 + K_p) = 0.5
K_v := limit(s*G(s), s → 0) → 0
K_v_error := 1*1/K_v == ∞  # error: This expression is divided by zero. It cannot be computed.
# Måling:
# Spørgsmål 1:
# Tou:
V_start := 120 mV
V_stationær := 5.602 V
V_τ := (V_stationær - V_start)*0.63 + V_start = 3.57366 V
τ := 21.3 ms
f_0 := 1/(2*π*τ) = 7.47206 Hz
# Spørgsmål 2 - open-loop:
α_1 := 7.88
α_2 := 170
α_1/(α_1 + s)*α_2/(α_2 + s) → 1339.6/((s + 7.88)*(s + 170))
# Spørgsmål 3
V_out := 2.73 V
V_in := 5.48 V
e(∞) := V_in - V_out = 2.75 V
# Spørgsmål 4 - closed loop
α_1 := 17.48
α_2 := 195
α_1/(α_1 + s)*α_2/(α_2 + s) → 3408.6/((s + 195)*(s + 17.48))
# Spørgsmål 5
V_start := 53 mV
V_stationær := 2.8 V
V_τ := (V_stationær - V_start)*0.63 + V_start = 1.78361 V
τ := 10.9 ms
f_0 := 1/(2*π*τ) = 14.6014 Hz
α := 1/τ = 91.7431 Hz
