# b)
K_t/(R*J)/(s + 1/J*(D + K_t*K_b/R)) simplify → J*K_t/(J*(D*R + K_b*K_t + R*J*s))
I_a := 14.4 mA
K_t := 43.9*10^-3 N*m/A
ω_no_load := 5190*(2*π/60) rad/s
E_a := 24 V
D := I_a*K_t/ω_no_load = 1.16314e-6 N*m*s/rad
T_m := I_a*K_t = 0.00063216 J
# c)
R := 17.73 Ω
J := (10.5*10^-3) kg*cm^2 = 1.05e-6 kg*m^2
K_b := E_a/ω_no_load = 0.0441586 V*s
G_ω(s) := 43.9*10^-3/(1.163*10^-6*17.73 + 0.044*43.9*10^-3 + 17.73*1.05*10^-6*s) simplify; float, 3 → 2358.0/(s + 105.0)
G_ω(s) == K_t/(D*R + K_b*K_t + R*J*s)
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G_ω(s) → 2358.0/(s + 105.0)
# Gearing og væskefriktion adderes til systemet:
G_ω(s) := 43.9*10^-3/(1.163*10^-6*(1/24)^2*17.73 + 0.044*43.9*10^-3 + 17.73*1.05*10^-6*(1/24)^2*s) simplify; float, 3 → 1.36*10^6/(s + 59770.0)
E_a := 5.068
τ_ms := 37.5*10^-3
α_ms := 1/τ_ms = 26.6667
K_ms := 1.19*α_ms/E_a = 6.26151
# Overføringsfunktion
G_ms(s) := K_ms/(s + α_ms) float, 3 → 6.26/(s + 26.7)
R_ms := 15.121
K_t := 0.038
J_ms := K_ms == K_t/(R_ms*J_ms) solve, J_ms; float, 3 → 0.000401
