# Opgave a
G_ω(s) := k_t/(R*J*s)/(1 + (D*R/k_t + k_b)*(k_t/(R*J*s))) simplify → k_t/(D*R + k_b*k_t + J*R*s)
G_θ(s) := k_t/(R*J*s)/(1 + (D*R/k_t + k_b)*(k_t/(R*J*s)))*1/s simplify → k_t/(s*(D*R + k_b*k_t + J*R*s))
G_θ(s) == k_t/(R*J*s)/(1 + (D*R/k_t + k_b)*(k_t/(R*J*s)))*1/s
# ganger nævner parentester sammen
G_θ(s) == k_t/(R*J*s)/(1 + D/(J*s)*k_b*k_t/(R*J*s))*1/s
# ganger igennem med s i tæller og nævner
G_θ(s) == k_t/(R*J)/(s + D/J*k_b*k_t/(R*J))*1/s
# ganger 1/s ind i udtrykket og sætter J udenfor en parentes
G_θ(s) == k_t/(R*J)/s(s + 1/J*(D*k_b*k_t/R))
# Opgave b
mJ := 10^-3*J
ω_no_load := (5190 s^-1/60)*2*π = 543.496 1/s
k_t := 43.9*10^-3*N*m/A
I_a := 14.4 mA
e_a := 24 V
R_a := 17.73 Ω
T_m := I_a*k_t = 0.63216 mJ
k_b := (e_a - R_a*I_a)/ω_no_load = 0.0436888 V*s
D := T_m/ω_no_load = 1.16314e-6 N*m*s/rad
J_m := 10.5*10^-3 kg*cm^2 = 1.05e-6 kg*m^2
N*m/A = 1 Wb
V*s = 1 Wb
# Spørgsmål c
43.9*10^-3/(1.163*10^-6*17.73 + 0.044*43.9*10^-3 + 1.05*10^-6*17.73*s) simplify; float, 3 → 2357.0/(s + 105.0)
# spørgsmål d
# Det er en 1. ordens overføringsfunktion.
K*α/(s + α)
# alfha findes ved at finde tidskonstanten tou, hvor alfha = 1/tou
# faktor K er en DC-forstærkning
# spørgsmål e
# Spørgsmål h
G_θ(s) := 1/(((R_a + L_a*s)/k_t*(J_m + D_m) + k_b)*s)  # error: This variable is undefined. Check that the label is set correctly.
# Måling
# Spørgsmål 1:
# Denne måling virker kun når motoren ikke drejer rundt, da ledet kb*omega da ikke medtages i udtrykket:
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e_a := □  # error: Missing term or expression.
I_a_max := 0.652 A  # <-- aflæst i databladet
# Arbejdspunktet fås som:
e_a := R_a*I_a_max/2 = 5.77998 V
# Vi indstiller da DC værdien til de 5.78 V
I_a_max/2 = 0.326 A
I_stall := 381 mA
R_a := e_a/(381 mA) = 15.1706 Ω
# Spørgsmål 2
n := 20
t := 23.82 s
I_a := 15 mA
V_tacho := 658 mV
e_a := 5.068 V
freq := n/t*24 = 20.1511 Hz
omsætningsforhold := freq/V_tacho = 30.6248 1/(V*s)
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k_b := (e_a - R_a*I_a)/(freq*2*π) = 0.0382301 V*s  # her deles med 24, fordi motoren kører 24 gange hurtigere end det vi måler på
k_t := k_b
D_ms := k_t*I_a/(freq*2*π) = 4.52916e-6 kg*m^2/s
# Spørgsmål 3
τ := 37.5 ms
V_tacho := 1.19 V  # afmålt spænding fra tacho-meteret
ω_slut := omsætningsforhold*V_tacho*2*π = 228.982 1/s
e_a := 9.2 V
α := 1/τ = 26.6667 1/s
(26.667 1/s)/(2*π) = 4.24418 1/s
K_m := ω_slut/e_a = 24.8893 1/Wb
V_tacho/e_a = 0.129348
K_m/α = 0.933349 1/V
# løser for Jm ud fra ligningen til højre
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J_m := k_t/(R_a*K_m) = 0.000101249 kg*m^2/s
# Spørgsmål 4
# Knækfrekvensen er i alpha/2pi:
α/(2*π) = 4.24413 1/s
# Denne tidsforskydning skal ses når -3 dB båndbredden opnås:
45 deg/(-4.2*s^-1*2*π) = -29.7619 ms
