0.1*61 mV - 37 mV = -30.9 mV
0.9*61 mV - 37 mV = 17.9 mV
65.2 mV/(67 mV) = 0.973134
0.1*65 mV - 40.9 mV = -34.4 mV
0.9*65 mV - 40.9 mV = 17.6 mV
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T_L := 4.085*10^-4 s = 408.5 μs
T_L + T_D == 0.00138*s solve, T_D → 0.00138*s - 408.5*μs = 971.5 μs
2 mV/(76.6 mV) = 0.0261097
76.6 mV/(79.6 mV) = 0.962312
0.1*76.4 mV - 25.6 mV = -17.96 mV
0.9*76.4 mV - 25.6 mV = 43.16 mV
83.2 mV/(78.8 mV) = 1.05584
0.1*79.6 mV - 32 mV = -24.04 mV
0.9*79.6 mV - 32 mV = 39.64 mV
84.2 mV/(79.4 mV) = 1.06045
26/1.6 = 16.25
45/1.6 = 28.125
