H(s) == 1/s*(1 - e^(-T*s))/s*k/(1 + 1/s*(1 - e^(-T*s))/s*k)
H(s) == 1/s*(1 - e^(-T*s))/s*k
H(s) == 1/s*(1 - Z^-1)/s*k
H(s) == (1 - e^(-T*s))*k/(s^2 + (1 - e^(-T*s))*k)
H(s) == (1/s^2*k)*(1 - Z^-1)
H(s) == (1 - Z^-1)*k/(s^2 + (1 - Z^-1)*k)
H(s) == T*K*Z/(Z - 1)^2*(1 - Z^-1)
H(s) == T*K*Z/(Z - 1)^2*(1 - Z^-1)
(1 - Z^-1) simplify → 1 - 1/Z
1/(Z - 1) simplify → 1/(Z - 1)
H(s) == T*K*1/(Z - 1)
H(s) == T*K*1/(Z - 1)
feedbackHz == T*K/(Z - 1 + T*K)
-(-1 + x) == -1 solve, x → 2
-(-1 + x) == 1 solve, x → 0
