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(2.046*z - 1.789)/(z - 0.03467) == 2.046*(z - 0.874)/(z - 0.03467) == 2.046*(1 - 0.874*z^-1)/(1 - 0.03467*z^-1)
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3.367/3.412 = 0.986811
(3.412*z - 3.367)/(z - 0.8293) == 3.412*(z - 0.987)/(z - 0.8293) == 3.412*(1 - 0.987*z^-1)/(1 - 0.8293*z^-1)
