mN := N*10^-3
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B == 1/(J*s)/(1 + D*1/(J*s))
ω == Ea*Kt/R*1/(J*s)/(1 + D*1/(J*s))/(1 + Kt/R*1/(J*s)/(1 + Dt*1/(J*s))*Kb) simplify → ω == (Ea*Dt*Kt + J*s*Ea*Kt)/((D + J*s)*(R*Dt + Kb*Kt + J*R*s))
Kt := 43.9 mN*m/A
I_a := 14.4 mA
Ea := 24 V
8.812/sqrt(2) = 6.23102
T_m := Kt*I_a = 0.00063216 J
R := 17.73 Ω
ω_no_load := (5190 s^-1/60)*2*π
J := 1.05 kg*10^-6*m^2
D := T_m/ω_no_load
Kb := Ea/ω_no_load
G(x) := Kt/(D*R + Kb*Kt + J*R*x) simplify, float, 3 → 4.39*10^25*N*m/(2.06*10^22*J*A*s*Ω + 1.94*10^24*N*V*m*s + 1.86*10^22*A*m^2*x*kg*Ω)
2.19*10^6*N*m/(96950.0*N*m*V*s + 1031.0*s*J*A*Ω + 9310.0*A*m^2*x*kg*Ω)
(1031.0 + 96950.0)/9310.0 = 10.5243
H(x) := 4.39*10^25*N*m/(2.06*10^22*J*A*s*Ω + 1.94*10^24*N*V*m*s + 1.86*10^22*A*m^2*x*kg*Ω) simplify → 219500.0*N*m/(93.0*x*A*kg*Ω*m^2 + 9700.0*N*V*s*m + 103.0*A*J*s*Ω)
219500.0*N*m/(93.0*x*A*kg*Ω*m^2 + 9700.0*N*V*s*m + 103.0*A*J*s*Ω)
(9700 + 103)/93 = 105.409
219500/93 = 2360.22
219500.0*N*m/(93.0*x*V*kg*m^2 + 9803*V*J*s) == 2360*1/V*kg*m/s^2/(x*kg*m + 105*kg*m/s^2*s) == 2360*1/V*1/s^2/(x + 105*1/s)
H(s) := 2360/(s + 105)
# [plot: s vs |H(s)|]
