G(s) := 50*1000/((s + 50)*(s + 1000))
# opgave B
0.69*100 = 69
OS := 5
ζ := -ln(OS/100)/sqrt(π^2 + ln(OS/100)^2) = 0.690107
φ_m := atan(2*ζ/(-2*ζ^2 + (1 + 4*ζ^4)^(1/2))^(1/2)) = 64.6253 deg
# Vi skal have en fasemargin på 64.625 grader.
# Det betyder at ved :  180-64-625 = 115 grader, skal vi have en forstærkning på 0 dB
180*deg - φ_m = 115.375 deg
180 - 69 = 111
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# Her er forstærkningen -22.5 dB. Dette skal den altså hæves med.
gg := 10^(20.5/20) = 10.5925
K_p := 13.3
e_kp(∞) := 1/(1 + K_p) = 0.0699301
T_r := 0.00226 s
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ω_φm := 581 rad/s
φ_m = 64.6253 deg
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# Opgave c
OS := 30
ζ := -ln(OS/100)/sqrt(π^2 + ln(OS/100)^2) = 0.357857
φ_faktiske := atan(2*ζ/(-2*ζ^2 + (1 + 4*ζ^4)^(1/2))^(1/2)) = 39.0901 deg
180 deg - φ_faktiske = 140.91 deg
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gg := 10^(32.7/20) = 43.1519
# Lead-regulator (resten af opgave C):
φ_m_plus := φ_m - φ_faktiske + 6 deg = 31.5352 deg
β := (1 - sin(φ_m_plus))/(1 + sin(φ_m_plus)) = 0.313179
ω_φm := 1310
T_lead := 1/(ω_φm*sqrt(β)) = 0.00136406
K_p := 43.152
G_lead(s) := 1/β*(s + 1/T_lead)/(s + 1/(β*T_lead))
G(s) := K_p*50*1000/((s + 50)*(s + 1000))
K_c := |G_lead(s)|*|G(s)|*K_c == 1 solve, K_c → 4.6347793845*10^-7*|s + 50.0|*|s + 1000.0|*|s + 2340.85911565|/|3.19306648757*s + 2340.85911565|  # error: This is a premium feature. To use this and other premium features, please upgrade to a full license using the 'Upgrade' button.
K_c := β^0.5 = 0.559624
T_r := 0.00107 s
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# Opgave d
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e(∞) := 1 - 0.93 = 0.07
α := 1/e(∞) = 14.2857
ω_φm := 476
T := 20/ω_φm = 0.0420168
G(s) := 13.3*50*1000/((s + 50)*(s + 1000))
G_lag(s) := (s + 1/T)/s
limit(G_lag, s → 0) simplify → limit(function, s → 0)
# PD-regulatoren
# vis at :
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# når τ_L << τ_D
K_p*(s + 1/(τ_D + τ_L))/(s + 1/τ_L)*(τ_D + τ_L)/τ_L == 1/β*(s + 1/T_lead)/(s + 1/(β*T_lead))*K_c
K_p*(s + 1/τ_D)/(s + 1/τ_L)*τ_D/τ_L == 1/β*(s + 1/T_lead)/(s + 1/(β*T_lead))*K_c
τ_L := β*T_lead*10^3 = 0.427194
τ_D := (T_lead*10^3 - τ_L) = 0.936864
# Da vi skal for PD-regulatoren skal hæve amplituden til 0 dB skal vi gange en Kp=43, men da lag-regulatoren også tilføjer en bidrag på en faktor Kc/beta=1.78, skal denne deles med kp bidraget.
# Den endelige kp fås da som:
K_c := K_c/β = 1.78692
K_p = 43.152
K_p/K_c = 24.1489
